// COMSOL Multiphysics 6.0.0.354 model "odd and open.mph"
// Outline of the model tree

Parameters
  dw = 5[mm]
  A = 2*dw+D+2*J  // dl
  B = 2*dw+D+2*F  // dw
  D = 10[mm]  // dc
  F = 2[mm]  // da
  H = F
  dgap1 = 0.5[mm]
  dgap2 = 1[mm]
  th_total = 1.6[mm]  // total thickness of PCB
  dv = 0.1[mm]  // the vertical distance between PCB and airgap
  insulation = 0.1[mm]  // insulation between FR4 and PCB
  bottom_solder = 0.01[mm]  // the distance between bottom layer and core
  I = th_total+bottom_solder+dv+dgap1
  C = ((pi*pi*(D/2)*(D/2)+F*H)/2/B)
  E = I-dgap1
  G = I-dgap2
  Ta = 77[K]
  J = C
  L = 1[mm]
  airgap = 0[mm]
  b5 = 0.8[mm]  // distance between bottom layer and layer 5
  b4 = 0.1[mm]  // distance between layer4 and layer 5
  b3 = 0.07[mm]  // distance between layer3 and layer 4
  fs = 1000[kHz]
  b2 = 0.1[mm]  // distance between layer2 and layer 3
  b1 = 0.15[mm]  // distance between layer2 and top layer
  thickness = 0.07[mm]  // copper thickness
  gwidth = 0.1[mm]  // copper gap width
  mu_core = 1000
  Vpri = 400[V]

Variables
  var1 "变量 1"
    core_loss = Int_core( Core_Stmz_k * (freq[s])^Core_Stmz_a * (mf.normB[1/T])^Core_Stmz_b )

Selections
  sel1: Explicit "secondary" on domains 2, 3
  sel2: Explicit "primary" on domains 8-11
  sel3: Explicit "core" on domains 4-6, 12

Couplings
  intop1: Integration "int_core" on selection sel3 | opname = int_core

Geometry
  geom1 "几何 1" (3D, length unit mm)
    wp1: WorkPlane "bottom_plate" | unite = on
      r1: Rectangle "矩形 1" | base = center; size = {B, A}
    ext1: Extrude "拉伸 1" | workplane = wp1; input = wp1; distance = C
    wp2: WorkPlane "center_circle" | quickz = C; unite = on
      c1: Circle "圆 1" | r = D/2
    ext2: Extrude "拉伸 2" | workplane = wp2; input = wp2; distance = E
    wp3: WorkPlane "auxiliary_leg" | quickz = C; unite = on
      r1: Rectangle "矩形 1" | pos = {-(B/2-F/2), 0}; base = center; size = {F, H}
      r2: Rectangle "矩形 2" | pos = {(B/2-F/2), 0}; base = center; size = {F, H}
    ext3: Extrude "拉伸 3" | workplane = wp3; input = wp3; distance = G
    wp4: WorkPlane "outer_leg" | quickz = C; unite = on
      r1: Rectangle "矩形 1" | pos = {0, A/2-J/2}; base = center; size = {B, J}
      r2: Rectangle "矩形 2" | pos = {0, -(A/2-J/2)}; base = center; size = {B, J}
    ext4: Extrude "拉伸 4" | workplane = wp4; input = wp4; distance = I
    wp5: WorkPlane "top_plate" | quickz = airgap+C+I; unite = on
      r1: Rectangle "矩形 1" | base = center; size = {B, A}
    ext5: Extrude "拉伸 5" | workplane = wp5; input = wp5; distance = C
    uni1: Union "并集 1" | input = ext1, ext2, ext3, ext4
    wp6: WorkPlane "PCB" (disabled) | quickz = C+insulation; unite = on
      r1: Rectangle "矩形 1" | base = center; size = {B+2*L, A-2*J-2*insulation}
      c1: Circle "圆 1" | r = D/2+insulation
      r2: Rectangle "矩形 2" | pos = {-(B/2-F/2), 0}; base = center; size = {F+2*insulation, H+2*insulation}
      r3: Rectangle "矩形 3" | pos = {(B/2-F/2), 0}; base = center; size = {F+2*insulation, H+2*insulation}
      dif1: Difference "差集 1" | input = r1; input2 = c1, r2, r3
    ext6: Extrude "拉伸 6" (disabled) | workplane = wp6; input = wp6; distance = th_total
    wp7: WorkPlane "bottom_layer" | quickz = C+insulation+bottom_solder; unite = on
      r1: Rectangle "矩形 1" | pos = {-(F+insulation+L)/2, 0}; base = center; size = {B+L-F-insulation, A-2*J-2*insulation}
      c1: Circle "圆 1" | r = D/2+insulation
      r2: Rectangle "矩形 2" | pos = {-(B/2-F/2), 0}; base = center; size = {F+2*insulation, H+2*insulation}
      r3: Rectangle "矩形 3" | pos = {(B/2-F/2), 0}; base = center; size = {F+2*insulation, H+2*insulation}
      dif1: Difference "差集 1" | input = r1; input2 = c1, r2, r3
      r4: Rectangle "矩形 4" | pos = {-B/4, 0}; base = center; size = {B/2, 2*gwidth}
      dif2: Difference "差集 2" | input = dif1; input2 = r4
    ext7: Extrude "拉伸 7" | workplane = wp7; input = wp7; distance = thickness
    mov1: Move "top_layer" | input = ext7; keep = on; displx = 0; disply = 0; displz = b5+b4+b3+b2+b1+5*thickness
    wp8: WorkPlane "工作平面 8" | quickz = C+insulation+bottom_solder+b5+thickness; unite = on
      r1: Rectangle "矩形 1" | pos = {(F+insulation+L)/2, 0}; base = center; size = {B+L-F-insulation, A-2*J-2*insulation}
      c1: Circle "圆 1" | r = D/2+insulation
      r2: Rectangle "矩形 2" | pos = {-(B/2-F/2), 0}; base = center; size = {F+2*insulation, H+2*insulation}
      r3: Rectangle "矩形 3" | pos = {(B/2-F/2), 0}; base = center; size = {F+2*insulation, H+2*insulation}
      dif1: Difference "差集 1" | input = r1; input2 = c1, r2, r3
      r4: Rectangle "矩形 4" | pos = {B/4, 0}; base = center; size = {B/2, 2*gwidth}
      dif2: Difference "差集 2" | input = dif1; input2 = r4
    ext8: Extrude "layer5" | workplane = wp8; input = wp8; distance = thickness
    mov2: Move "layer4" | input = ext8; keep = on; displx = 0; disply = 0; displz = b4+thickness
    mov3: Move "layer3" | input = mov2; keep = on; displx = 0; disply = 0; displz = b3+thickness
    mov4: Move "layer2" | input = mov3; keep = on; displx = 0; disply = 0; displz = b2+thickness
    blk1: Block "长方体 1" | base = center; size = {70, 70, 50}
    wp9: WorkPlane "工作平面 9" | quickplane = xz; unite = on
    pard1: PartitionDomains "分割域 1"
      domain = mov2(1) domains 1; blk1(1) domains 1; mov3(1) domains 1; ext5(1) domains 1; mov4(1) domains 1; uni1(1) domains 1-6; ext7(1) domains 1; mov1(1) domains 1; ext8(1) domains 1
      workplane = wp9
    uni2: Union "并集 2" | input = pard1(6), pard1(4)
    del1: Delete "删除实体 1"
      input = pard1(2) domains 2; uni2(1) domains 5-8, 10, 12; pard1(5) domains 2; pard1(3) domains 2; pard1(1) domains 2; pard1(9) domains 2; pard1(8) domains 2; pard1(7) domains 2
    fin: Finalize "形成联合体"

Materials
  mat1: Common "Air" on all domains
    def "Basic"
      thermalexpansioncoefficient = alpha_p(pA,T)
      molarmass = 0.02897[kg/mol]
      bulkviscosity = muB(T)
      relpermeability = 1
      relpermittivity = 1
      dynamicviscosity = eta(T)
      ratioofspecificheat = 1.4
      electricconductivity = 0.01[S/m]
      heatcapacity = Cp(T)
      density = rho(pA,T)
      thermalconductivity = k(T)
      soundspeed = cs(T)
      eta: Piecewise | arg = T; pieces = {200.0, 1600.0, -8.38278E-7+8.35717342E-8*T^1-7.69429583E-11*T^2+4.6437266E-14*T^3-1.06585607E-17*T^4}; argunit = K; fununit = Pa*s
      Cp: Piecewise | arg = T; pieces = {200.0, 1600.0, 1047.63657-0.372589265*T^1+9.45304214E-4*T^2-6.02409443E-7*T^3+1.2858961E-10*T^4}; argunit = K; fununit = J/(kg*K)
      rho: Analytic | expr = pA*0.02897/R_const[K*mol/J]/T; args = {pA, T}; fununit = kg/m^3; argunit = {Pa, K}
      k: Piecewise | arg = T; pieces = {200.0, 1600.0, -0.00227583562+1.15480022E-4*T^1-7.90252856E-8*T^2+4.11702505E-11*T^3-7.43864331E-15*T^4}; argunit = K; fununit = W/(m*K)
      cs: Analytic | expr = sqrt(1.4*R_const[K*mol/J]/0.02897*T); args = T; fununit = m/s; argunit = K
      an1: Analytic | funcname = alpha_p; expr = -1/rho(pA,T)*d(rho(pA,T),T); args = {pA, T}; fununit = 1/K; argunit = {Pa, K}
      an2: Analytic "Analytic 2a" | funcname = muB; expr = 0.6*eta(T); args = T; fununit = Pa*s; argunit = K
    RefractiveIndex
      n = 1
      ki = 0
    NonlinearModel
      BA = (def.gamma+1)/2
    idealGas
      Rs = R_const/Mn
      heatcapacity = Cp(T)
      ratioofspecificheat = 1.4
      molarmass = 0.02897
      Cp: Piecewise | arg = T; pieces = {200.0, 1600.0, 1047.63657-0.372589265*T^1+9.45304214E-4*T^2-6.02409443E-7*T^3+1.2858961E-10*T^4}; argunit = K; fununit = J/(kg*K)
  mat2: Common "core" on domains 4-7, 12, 13
    def "基本"
      relpermittivity = 1
      electricconductivity = 0.00001
      relpermeability = mu_core
  mat3: Common "FR4 (Circuit Board)" (disabled) on domains 4-6, 12
    def "Basic"
      relpermeability = 1000
      electricconductivity = 0.004[S/m]
      relpermittivity = 4.5
      thermalexpansioncoefficient = 18e-6[1/K]
      heatcapacity = 1369[J/(kg*K)]
      density = 1900[kg/m^3]
      thermalconductivity = 0.3[W/(m*K)]
    Enu "Young's modulus and Poisson's ratio"
      E = 22e9[Pa]
      nu = 0.15
  mat4: Common "Copper" on domains 2, 3, 8-11
    def "Basic"
      relpermeability = 1
      electricconductivity = 5.998e7[S/m]
      heatcapacity = 385[J/(kg*K)]
      relpermittivity = 1
      emissivity = 0.5
      density = 8940[kg/m^3]
      thermalconductivity = 400[W/(m*K)]
    Enu "Young's modulus and Poisson's ratio"
      E = 126e9[Pa]
      nu = 0.34
    linzRes "Linearized resistivity"
      rho0 = 1.667e-8[ohm*m]
      alpha = 3.862e-3[1/K]
      Tref = 293.15[K]

Physics
  mf: InductionCurrents "磁场(odd and open)" on all domains
    dependent variable A = {Ax, Ay, Az}
    al1: AmperesLaw "安培定律 1" (default)
    mi1: MagneticInsulation "磁绝缘 1" (default)
    init1: init "初始值 1" (default)
    coil1: Coil "p1" on domains 11 | ConductorModel = Single; CoilExcitation = Voltage; CoilName = p1; VCoil = Vpri/4
      ccc1: CoilCurrentCalculation "几何分析 1" (default) | fl = 2
        ct1: CoilTerminal "输入 1" on boundaries 120
        cg1: CoilGround "输出 1" on boundaries 68
    coil2: Coil "p2" on domains 10 | CoilExcitation = Current; CoilName = p2; ICoil = mf.ICoil_p1
      ccc1: CoilCurrentCalculation "几何分析 1" (default) | fl = 2
        ct1: CoilTerminal "输入 1" on boundaries 119
        cg1: CoilGround "输出 1" on boundaries 67
    coil3: Coil "p3" on domains 9 | CoilExcitation = Current; CoilName = p3; ICoil = mf.ICoil_p1
      ccc1: CoilCurrentCalculation "几何分析 1" (default) | fl = 2
        ct1: CoilTerminal "输入 1" on boundaries 118
        cg1: CoilGround "输出 1" on boundaries 66
    coil4: Coil "p4" on domains 8 | CoilExcitation = Current; CoilName = p4; ICoil = mf.ICoil_p1
      ccc1: CoilCurrentCalculation "几何分析 1" (default) | fl = 2
        ct1: CoilTerminal "输入 1" on boundaries 117
        cg1: CoilGround "输出 1" on boundaries 65
    coil5: Coil "s1" on domains 3 | CoilExcitation = Current; CoilName = s1; ICoil = 0; VCoil = 0
      ccc1: CoilCurrentCalculation "几何分析 1" (default) | fl = 2
        ct1: CoilTerminal "输入 1" on boundaries 15
        cg1: CoilGround "输出 1" on boundaries 91
    coil6: Coil "s2" on domains 2 | CoilExcitation = Current; CoilName = s2; ICoil = 0; VCoil = 0
      ccc1: CoilCurrentCalculation "几何分析 1" (default) | fl = 2
        ct1: CoilTerminal "输入 1" on boundaries 14
        cg1: CoilGround "输出 1" on boundaries 90

Mesh
  mesh1 "网格 1"
    size: MeshSizeDefault "大小" | hmax = 7; hmin = 1.26; hcurve = 0.6; hnarrow = 0.5; hgrad = 1.5
    size1: Size "大小 1" on domains 2, 3, 8-11 | hauto = 4
    ftet1: FreeTet "自由四面体网格 1" on remaining entities

Studies
  std1 "odd and open"
    ccc: CoilCurrentCalculation "线圈几何分析"
    freq: Frequency "频域" | plist = fs

Solver configurations
  sol1 "解 1" (study std1)
    v1: Variables "因变量 1"
    s1: Stationary "稳态求解器 1"
      dDef: Direct "直接"
      fc1: FullyCoupled "全耦合 1" | linsolver = dDef
    su1: StoreSolution "解存储 1"
    v2: Variables "因变量 2" | initmethod = sol; notsolmethod = sol
    s2: Stationary "稳态求解器 2" | linpmethod = sol
      p1: Parametric "参数化 1" | pname = freq; plistarr = fs; punit = Hz; pcontinuationmode = no
      fc1: FullyCoupled "全耦合 1" | linsolver = i1
      i1: Iterative "迭代 1" | linsolver = bicgstab; prefuntype = right; nlinnormuse = on; rhob = 10000
        mg1: Multigrid "多重网格 1"

Datasets
  dset1: Solution | solution = sol1

Derived values
  gev1: EvalGlobal "全局计算 1"
    data = dset1
    table = new
    expr = {mf.ICoil_p1, Vpri/mf.ICoil_p1, -(mf.VCoil_s1+mf.VCoil_s2)/mf.ICoil_p1}
    descr = {线圈电流, , }

Tables
  tbl2: Table "表格 2"
    // 全局计算 1
    freq (Hz)
    1e+06
  tbl3: Table "表格 3"
    // 全局计算 1

Plots
  pg1: PlotGroup3D "磁通密度模 (mf)" | data = dset1
    mslc1: Multislice "多切面 1"
      expr = mf.normB
      multiplanexmethod = coord
      xcoord = mf.CPx
      multiplaneymethod = coord
      ycoord = mf.CPy
      multiplanezmethod = coord
      zcoord = mf.CPz
    strmsl1: StreamlineMultislice "流线多切面 1"
      expr = {mf.Bx, mf.By, mf.Bz}
      multiplanexmethod = coord
      xcoord = mf.CPx
      multiplaneymethod = coord
      ycoord = mf.CPy
      multiplanezmethod = coord
      zcoord = mf.CPz
      udist = 0.02
      col1: Color "颜色表达式 1" | expr = mf.normB
      filt1: Filter "过滤器 1" | expr = !isScalingSystemDomain